y(t, C) := -8*t + C
НАЧАЛЬНЫЙ_МОМЕНТ_ВРЕМЕНИ := 0
КОНЕЧНЫЙ_МОМЕНТ_ВРЕМЕНИ := 10
КОЛИЧЕСТВО_ТОЧЕК := 100
МАТРИЦА := Rkadapt([1; 1], НАЧАЛЬНЫЙ_МОМЕНТ_ВРЕМЕНИ, КОНЕЧНЫЙ_МОМЕНТ_ВРЕМЕНИ, КОЛИЧЕСТВО_ТОЧЕК, y)
ТОЧКИ_T := МАТРИЦА[:, 0] = [
    0; 0.1; 0.2; 0.3; 0.4; 0.5; 0.6; 0.7; 0.8; 0.9
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]
ТОЧКИ_X := МАТРИЦА[:, 1] = [
    1; 1.0638; 1.05018; 0.950988; 0.757227; 0.458951; 0.0451684; -0.496269; -1.17879; -2.01722
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]
ТОЧКИ_Y := МАТРИЦА[:, 2] = [
    1; 1.0638; 1.05018; 0.950988; 0.757227; 0.458951; 0.0451684; -0.496269; -1.17879; -2.01722
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]
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