m := 1
Ω := 1
a := 1
g := 9.81
λ := g/(a*Ω^2)
Υ := a^2*m
СИСТЕМА_ДУ(u, Y) := [Y[1]; m*a^2*Ω^2/Υ*sin(Y[0])*(cos(Y[0]) - λ)]
НАЧАЛЬНЫЙ_МОМЕНТ_ВРЕМЕНИ := 0
КОНЕЧНЫЙ_МОМЕНТ_ВРЕМЕНИ := 10
КОЛИЧЕСТВО_ТОЧЕК := 100
s1 := Rkadapt([1; 1], НАЧАЛЬНЫЙ_МОМЕНТ_ВРЕМЕНИ, КОНЕЧНЫЙ_МОМЕНТ_ВРЕМЕНИ, КОЛИЧЕСТВО_ТОЧЕК, СИСТЕМА_ДУ)
ТОЧКИ_T := s1[:, 0] = [
    0; 0.1; 0.2; 0.3; 0.4; 0.5; 0.6; 0.7; 0.8; 0.9
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]
ТОЧКИ_X := s1[:, 1] = [
    1; 1.06025; 1.03954; 0.939006; 0.764548; 0.527718; 0.246316; -0.0563833; -0.354178; -0.621558
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]
ТОЧКИ_Y := s1[:, 2] = [
    1; 0.199489; -0.61185; -1.38917; -2.08087; -2.62595; -2.96285; -3.04683; -2.86596; -2.44556
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]
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